OpenVSP model (file version 4), 12 components.
Geometry view with OpenVSP parameter names; values to 6 digits, angles in degrees, lengths in the model's unit.
Overall bounding box: X_Min=-1.6 X_Len=17.9 Y_Min=-18.35 Y_Len=36.7 Z_Min=-1.25 Z_Len=6.37667

Wing "Wing"
  location (X Y Z) 5 0 0, rotation 0 0 0
  symmetric about XZ
  bounding box size 4.7748 29.4596 0.9544
  totals: TotalSpan=29.5 TotalProjectedSpan=29.4596 TotalChord=1.82373 TotalArea=53.8
  root: chord 2.70182, twist 0, NACA 4-series Camber=0 CamberLoc=0.2 ThickChord=0.1
  sections:
    n  Span   Root_Chord  Tip_Chord  Area  Sweep  Sweep_Location  Dihedral  Twist  Twist_Location  tip airfoil
    1  14.75  2.70182     0.945637   26.9  -8     0               3         0      0.25            as above

Disk "Rotor", child of "Wing"
  location (X Y Z) 2 14.75 1.5, rotation 0 90 0; relative location -3 14.75 1.5, rotation 0 90 0
  symmetric about XZ
  bounding box size 3.6 33.1 0
  Design: Diameter=3.6
  custom script Disk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

Custom "Rotor", child of "Wing"
  location (X Y Z) 2.4 11 1.35, rotation 0 90 0; relative location -2.6 11 1.35, rotation 0 90 0
  symmetric about XZ
  bounding box size 3.6 25.6 0
  Design: Diameter=3.6
  custom script Disk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

Custom "Rotor", child of "Wing"
  location (X Y Z) 2.8 7.25 1.2, rotation 0 90 0; relative location -2.2 7.25 1.2, rotation 0 90 0
  symmetric about XZ
  bounding box size 3.6 18.1 0
  Design: Diameter=3.6
  custom script Disk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

Custom "Rotor", child of "Wing"
  location (X Y Z) 3.2 3.5 1.05, rotation 0 90 0; relative location -1.8 3.5 1.05, rotation 0 90 0
  symmetric about XZ
  bounding box size 3.6 10.6 0
  Design: Diameter=3.6
  custom script Disk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

Custom "Large Rotor", child of "Wing"
  location (X Y Z) 2 14.75 1.5, rotation 0 90 0; relative location -3 14.75 1.5, rotation 0 90 0
  symmetric about XZ
  bounding box size 7.2 36.7 0
  Design: Diameter=7.2
  custom script Disk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

Custom "Large Rotor", child of "Wing"
  location (X Y Z) 3 6.3 1.2, rotation 0 90 0; relative location -2 6.3 1.2, rotation 0 90 0
  symmetric about XZ
  bounding box size 7.2 19.8 0
  Design: Diameter=7.2
  custom script Disk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

Fuselage "Fuselage"
  location (X Y Z) 0 0 0, rotation 0 0 0
  bounding box size 16 3 2.5
  Design: Length=16
  cross sections:
    n  XLocPercent  YLocPercent  ZLocPercent  shape
    0  0            0            -0.0333333   point
    1  0.2625       0            0            ellipse Ellipse_Height=2.5 Ellipse_Width=3
    2  0.4          0            0            as above
    3  0.6875       0            0.023125     ellipse Ellipse_Height=1.2 Ellipse_Width=1.2
    4  1            0            0.0266667    point

Wing "Tailplane"
  location (X Y Z) 13.6 0 0.42667, rotation 0 0 0
  symmetric about XZ
  bounding box size 2.27564 11.632 4.24996
  totals: TotalSpan=14.2 TotalProjectedSpan=11.632 TotalChord=1.775 TotalArea=25.205
  root: chord 2.27564, twist 0, NACA 4-series Camber=0 CamberLoc=0.2 ThickChord=0.1
  sections:
    n  Span  Root_Chord  Tip_Chord  Area     Sweep  Sweep_Location  Dihedral  Twist  Twist_Location  tip airfoil
    1  7.1   2.27564     1.27436    12.6025  0      0.25            35        0      0.25            as above

Custom "Rotor", child of "Tailplane"
  location (X Y Z) 12.7 5.8 5.12667, rotation 0 90 0; relative location -0.9 5.8 4.7, rotation 0 90 0
  symmetric about XZ
  bounding box size 3.6 15.2 0
  Design: Diameter=3.6
  custom script Disk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

Custom "Rotor", child of "Tailplane"
  location (X Y Z) 12.6 2 2.42667, rotation 0 90 0; relative location -1 2 2, rotation 0 90 0
  symmetric about XZ
  bounding box size 3.6 7.6 0
  Design: Diameter=3.6
  custom script Disk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

Custom "Large Rotor", child of "Tailplane"
  location (X Y Z) 12.7 5.8 5.12667, rotation 0 90 0; relative location -0.9 5.8 4.7, rotation 0 90 0
  symmetric about XZ
  bounding box size 7.2 18.8 0
  Design: Diameter=7.2
  custom script Disk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
